# Worksheet setting: ORIGIN = 1
i := 1 .. n  # error: This variable is undefined. Check that the label is set correctly.
nint := 1
n := 3*nint
j := 1 .. n
n = 3
mx :=
    for i ∈ 1 .. n
        mx[1, i] ← 1
        mx
v :=
    for i ∈ 1 .. n
        v[1, i] ← 1
        v
ρ :=
    for i ∈ 1 .. n
        for j ∈ 1 .. n
            if i == j
                ρ[i, j] ← 1
                ρ
            else
                ρ[i, j] ← 0.5
                ρ
mx = [1, 1, 1]
v = [1, 1, 1]
ρ = [1, 0.5, 0.5; 0.5, 1, 0.5; 0.5, 0.5, 1]
Σ := ρ
Σ = [1, 0.5, 0.5; 0.5, 1, 0.5; 0.5, 0.5, 1]
A := [4, -2, 1; 2, 5, -1]
I := [1, nint + 1, nint*2 + 1]
I = [1, 2, 3]
# ___ V[Y] and E[Y] ___________________________________________________
l := 1 .. 2
a ← sqrt(V)
V := A*Σ*transpose(A)
V = [15, 7.5; 7.5, 33]
mY := A*transpose(mx)
V[1, 1] + V[2, 2] = 48
mY = [3; 6]
# ____ Conditional Σ and mcond(x) _________________________________________
Σcond1 :=
    k ← 1
    for j ∈ (1 .. n)
        for t ∈ (1 .. n)
            ΣΣ[t, j] ← Σ[t, j] - Σ[t, k]*Σ[k, j]/Σ[k, k]
    Σcond1 ← A*ΣΣ*transpose(A)
    Σcond1
Σcond2 :=
    k ← 2
    for j ∈ (1 .. n)
        for t ∈ (1 .. n)
            ΣΣ[t, j] ← Σ[t, j] - Σ[t, k]*Σ[k, j]/Σ[k, k]
    Σcond2 ← A*ΣΣ*transpose(A)
    Σcond2
Σcond3 :=
    k ← 3
    for j ∈ (1 .. n)
        for t ∈ (1 .. n)
            ΣΣ[t, j] ← Σ[t, j] - Σ[t, k]*Σ[k, j]/Σ[k, k]
    Σcond3 ← A*ΣΣ*transpose(A)
    Σcond3
Σcond1 = [2.75, -6.5; -6.5, 17]
Σcond2 = [14.75, 4.75; 4.75, 2.75]
Σcond3 = [11, 2.5; 2.5, 26.75]
m11(x) := sum(A[1, j]*(mx[1, j] + (x - mx[1, j])*Σ[j, 1]/Σ[1, 1]), j = 1 .. n)
m12(x) := sum(A[2, j]*(mx[1, j] + (x - mx[1, j])*Σ[j, 1]/Σ[1, 1]), j = 1 .. n)
m22(x) := sum(A[2, j]*(mx[1, j] + (x - mx[1, j])*Σ[j, 2]/Σ[2, 2]), j = 1 .. n)
m21(x) := sum(A[1, j]*(mx[1, j] + (x - mx[1, j])*Σ[j, 2]/Σ[2, 2]), j = 1 .. n)
m31(x) := sum(A[1, j]*(mx[1, j] + (x - mx[1, j])*Σ[j, 3]/Σ[3, 3]), j = 1 .. n)
m32(x) := sum(A[2, j]*(mx[1, j] + (x - mx[1, j])*Σ[j, 3]/Σ[3, 3]), j = 1 .. n)
W1inn(x) := sqrt((mY[1, 1] - m11(x))^2 + (mY[2, 1] - m12(x))^2 + trace(V) + trace(Σcond1) - 2*trace((sqrt(M1)*M2*sqrt(M1))^(1/2)))  # error: This variable is undefined. Check that the label is set correctly.
# From File matlab MultivariateGaussianAnalytical.m
SqrtVold := [3.7913, 0.7910; 0.7910, 5.6]
SqrtSig1old := [0.9945, -1.3270; -1.3270, 3.9037]
SqrtSig2old := [3.7258, 0.9318; 0.9318, 1.3718]
lambda1aux := eigenvals(Σcond1)
lambda2aux := eigenvals(Σcond2)
lambda1 :=
    for i ∈ 1 .. 2
        lambda1[i] ← max(lambda1aux[i], 0)
        lambda1
lambda2 :=
    for i ∈ 1 .. 2
        lambda2[i] ← max(lambda2aux[i], 0)
        lambda2
lambda3aux := eigenvals(Σcond3)
lambda3 :=
    for i ∈ 1 .. 2
        lambda3[i] ← max(lambda3aux[i], 0)
        lambda3
eigvct1 := eigenvecs(Σcond1)
sigma1 := sqrt(lambda1)
eigvct2 := eigenvecs(Σcond2)
sigma2 := sqrt(lambda2)
eigvct3 := eigenvecs(Σcond3)
sigma3 := sqrt(lambda3)
SqrtSig1 := eigvct1*diag(sigma1)*transpose(eigvct1)
SqrtSig2 := eigvct2*diag(sigma2)*transpose(eigvct2)
SqrtSig3 := eigvct3*diag(sigma3)*transpose(eigvct3)
SqrtSig1 = [0.994507, -1.32701; -1.32701, 3.90372]
SqrtSig2 = [3.72582, 0.931815; 0.931815, 1.37176]
SqrtSig3 = [3.30346, 0.295262; 0.295262, 5.16361]
lambdaV := eigenvals(V)
eigvctV := eigenvecs(V)
sigmaV := sqrt(lambdaV)
SqrtSigV := eigvctV*diag(sigmaV)*transpose(eigvctV)
SqrtSigV = [3.79134, 0.791041; 0.791041, 5.68984]
P1aux := SqrtSig1*V*SqrtSig1
P2aux := SqrtSig2*V*SqrtSig2
P3aux := SqrtSig3*V*SqrtSig3
lambdaP1 := eigenvals(P1aux)
lambdaP2 := eigenvals(P2aux)
lambdaP3 := eigenvals(P3aux)
eigvctP1 := eigenvecs(P1aux)
sigmaP1 := sqrt(lambdaP1)
eigvctP2 := eigenvecs(P2aux)
sigmaP2 := sqrt(lambdaP2)
P2 := eigvctP2*diag(sigmaP2)*transpose(eigvctP2)
eigvctP3 := eigenvecs(P3aux)
P1 := eigvctP1*diag(sigmaP1)*transpose(eigvctP1)
sigmaP3 := sqrt(lambdaP3)
P3 := eigvctP3*diag(sigmaP3)*transpose(eigvctP3)
# Defining the Trace Function
Tr(X) := X[1, 1] + X[2, 2]
Tr(V) = 48
TrP1old := 24.3643
TrP2old := 23.6851
Tr(P1) = 24.3643
Tr(P2) = 23.6851
Tr(P3) = 42.3815
TrP3old := 42.3815
W1inn(x) := sqrt((mY[1, 1] - m11(x))^2 + (mY[2, 1] - m12(x))^2 + Tr(V) + Tr(Σcond1) - 2*Tr(P1))
W12inn(x) := (mY[1, 1] - m11(x))^2 + (mY[2, 1] - m12(x))^2 + Tr(V) + Tr(Σcond1) - 2*Tr(P1)
WVBa1(x) := sqrt((mY[1, 1] - m11(x))^2 + (mY[2, 1] - m12(x))^2 + Tr(V) + Tr(Σcond1) - 2*Tr(P1))
Adv1aux1(x) := (mY[1, 1] - m11(x))^2 + (mY[2, 1] - m12(x))^2
Diff1Aux1(x) := Tr(V) + Tr(Σcond1) - 2*Tr(P1)
Adv1aux2 := integral(Adv1aux1(y)*(1/(v[1, 1]*sqrt(2*π))*e^(-1/2*(y - mx[1, 1])^2/v[1, 1]^2)), y = -∞ .. ∞)
Adv1 := Adv1aux2/(2*(V[1, 1] + V[2, 2]))
Adv1 = 0.294271
W1 := integral(W1inn(y)*1/(v[1, 1]*sqrt(2*π))*e^(-1/2*(y - mx[1, 1])^2/v[1, 1]^2), y = -∞ .. ∞)
Diff1Aux2 := integral(Diff1Aux1(y)*(1/(v[1, 1]*sqrt(2*π))*e^(-1/2*(y - mx[1, 1])^2/v[1, 1]^2)), y = -∞ .. ∞)
W12 := integral(W12inn(y)*1/(v[1, 1]*sqrt(2*π))*e^(-1/2*(y - mx[1, 1])^2/v[1, 1]^2), y = -∞ .. ∞)
Diff1 := Diff1Aux2/(2*(V[1, 1] + V[2, 2]))
Diff1 = 0.19814
Adv1 + Diff1 = 0.492411
W1 = 6.46748
W1Normalized := W1^2/(2*(V[1, 1] + V[2, 2]))
W1Normalized = 0.435712
W12 = 47.2715
i1 := W12/(2*(V[1, 1] + V[2, 2]))
i1 = 0.492411
WVB1 := integral(sqrt((mY[1, 1] - m11(y))^2 + (mY[2, 1] - m12(y))^2)*1/(v[1, 1]*sqrt(2*π))*e^(-1/2*(y - mx[1, 1])^2/v[1, 1]^2), y = -∞ .. ∞)
WVB1 = 4.24081
W2inn(x) := sqrt((mY[1, 1] - m21(x))^2 + (mY[2, 1] - m22(x))^2 + Tr(V) + Tr(Σcond2) - 2*Tr(P2))
W22inn(x) := (mY[1, 1] - m21(x))^2 + (mY[2, 1] - m22(x))^2 + Tr(V) + Tr(Σcond2) - 2*Tr(P2)
# [plot: W1inn(q), sqrt((mY[1, 1] - m11(q))^2 + (mY[2, 1] - m12(q))^2) vs q]
Adv2aux1(x) := (mY[1, 1] - m21(x))^2 + (mY[2, 1] - m22(x))^2
Diff2Aux1(x) := Tr(V) + Tr(Σcond2) - 2*Tr(P2)
W2 := integral(W2inn(y)*1/(v[1, 2]*sqrt(2*π))*e^(-1/2*(y - mx[1, 2])^2/v[1, 2]^2), y = -∞ .. ∞)
W22 := integral(W22inn(y)*1/(v[1, 2]*sqrt(2*π))*e^(-1/2*(y - mx[1, 2])^2/v[1, 2]^2), y = -∞ .. ∞)
W2 = 6.51871
W22 = 48.6297
Adv2aux2 := integral(Adv2aux1(y)*(1/(v[1, 2]*sqrt(2*π))*e^(-1/2*(y - mx[1, 2])^2/v[1, 2]^2)), y = -∞ .. ∞)
i2 := W22/(2*(V[1, 1] + V[2, 2]))
i2 = 0.50656
Diff2Aux2 := integral(Diff2Aux1(y)*(1/(v[1, 2]*sqrt(2*π))*e^(-1/2*(y - mx[1, 2])^2/v[1, 2]^2)), y = -∞ .. ∞)
W3inn(x) := sqrt((mY[1, 1] - m31(x))^2 + (mY[2, 1] - m32(x))^2 + Tr(V) + Tr(Σcond3) - 2*Tr(P3))
Adv2 := Adv2aux2/(2*(V[1, 1] + V[2, 2]))
Adv2 = 0.317708
Diff2 := Diff2Aux2/(2*(V[1, 1] + V[2, 2]))
Diff2 = 0.188851
W32inn(x) := (mY[1, 1] - m31(x))^2 + (mY[2, 1] - m32(x))^2 + Tr(V) + Tr(Σcond3) - 2*Tr(P3)
Adv2 + Diff2 = 0.50656
Adv3aux1(x) := (mY[1, 1] - m31(x))^2 + (mY[2, 1] - m32(x))^2
W3 := integral(W3inn(y)*1/(v[1, 3]*sqrt(2*π))*e^(-1/2*(y - mx[1, 3])^2/v[1, 3]^2), y = -∞ .. ∞)
Diff3Aux1(x) := Tr(V) + Tr(Σcond3) - 2*Tr(P3)
W32 := integral(W32inn(y)*1/(v[1, 3]*sqrt(2*π))*e^(-1/2*(y - mx[1, 3])^2/v[1, 3]^2), y = -∞ .. ∞)
W3 = 2.85552
W1inn(x) := sqrt((mY[1, 1] - m11(x))^2 + (mY[2, 1] - m12(x))^2 + Tr(V) + Tr(Σcond1) - 2*Tr(P1))
Adv3aux2 := integral(Adv3aux1(y)*1/(v[1, 3]*sqrt(2*π))*e^(-1/2*(y - mx[1, 3])^2/v[1, 3]^2), y = -∞ .. ∞)
Diff3Aux2 := integral(Diff3Aux1(y)*1/(v[1, 3]*sqrt(2*π))*e^(-1/2*(y - mx[1, 3])^2/v[1, 3]^2), y = -∞ .. ∞)
W32 = 11.237
i3 := W32/(2*(V[1, 1] + V[2, 2]))
i3 = 0.117052
Adv3 := Adv3aux2/(2*(V[1, 1] + V[2, 2]))
Adv3 = 0.106771
Diff3 := Diff3Aux2/(2*(V[1, 1] + V[2, 2]))
Diff3 = 0.0102809
# Sinkhorn
sig := 10
d := 2
Id := [1, 0; 0, 1]
Adv3 + Diff3 = 0.117052
Dsigma1old := [8.1233, -12.1498; -12.1498, 40.7404]
Dsigma2old := [31.9256, 11.7295; 11.7295, 15.5112]
Dsigma3old := [25.3466, 9.1295; 9.1295, 59.4462]
AuxDsigma1 := 4*SqrtSig1*V*SqrtSig1 + sig^4*identity(2)
lambdaDs := eigenvals(AuxDsigma1)
eigenvals(AuxDsigma1) = [12003.2; 10015.8]
sigmaDs := sqrt(lambdaDs)
eigvctDs := eigenvecs(AuxDsigma1)
Dsigma1 := eigvctDs*diag(sigmaDs)*transpose(eigvctDs)
Dsigma1 = [101.018, -2.83194; -2.83194, 108.62]
AuxDsigma2 := 4*SqrtSig2*V*SqrtSig2 + sig^4*identity(2)
lambdaDs2 := eigenvals(AuxDsigma2)
sigmaDs2 := sqrt(lambdaDs2)
eigvctDs2 := eigenvecs(AuxDsigma2)
Dsigma2 := eigvctDs2*diag(sigmaDs2)*transpose(eigvctDs2)
Dsigma2 = [105.587, 2.68252; 2.68252, 101.833]
AuxDsigma3 := 4*SqrtSig3*V*SqrtSig3 + sig^4*identity(2)
lambdaDs3 := eigenvals(AuxDsigma3)
sigmaDs3 := sqrt(lambdaDs3)
eigvctDs3 := eigenvecs(AuxDsigma3)
Dsigma3 := eigvctDs3*diag(sigmaDs3)*transpose(eigvctDs3)
Dsigma3 = [103.501, 3.51655; 3.51655, 116.635]
OT1inn(x) := (mY[1, 1] - m11(x))^2 + (mY[2, 1] - m12(x))^2 + (Tr(V) + Tr(Σcond1)) - Tr(Dsigma1) + (d*sig^2*(1 - ln(2*sig^2)) + sig^2*ln(|Dsigma1 + sig^2*Id|))
V = [15, 7.5; 7.5, 33]
# [plot: sqrt(OT1inn(q)), W1inn(q) vs q]
# [plot: sqrt(OT1inn(q)) - W1inn(q) vs q]
OT1 := integral(OT1inn(y)*1/(v[1, 1]*sqrt(2*π))*e^(-1/2*(y - mx[1, 1])^2/v[1, 1]^2), y = -∞ .. ∞) = 91.0702
VY := V[1, 1] + V[2, 2]
SqrtOT1 := integral(sqrt(OT1inn(y))*1/(v[1, 1]*sqrt(2*π))*e^(-1/2*(y - mx[1, 1])^2/v[1, 1]^2), y = -∞ .. ∞) = 9.37645
iotaepsilon2 := OT1/(2*VY) = 0.948648
OT2inn(x) := (mY[1, 1] - m21(x))^2 + (mY[2, 1] - m22(x))^2 + (Tr(V) + Tr(Σcond2)) - Tr(Dsigma2) + (d*sig^2*(1 - ln(2*sig^2)) + sig^2*ln(|Dsigma2 + sig^2*Id|))
VY := V[1, 1] + V[2, 2]
OT2 := integral(OT2inn(y)*1/(v[1, 2]*sqrt(2*π))*e^(-1/2*(y - mx[1, 2])^2/v[1, 2]^2), y = -∞ .. ∞) = 92.2301
sqrt(OT2) = 9.60365
iotaepsilon2 := OT2/(2*VY) = 0.96073
SqrtOT2 := integral(sqrt(OT2inn(y))*1/(v[1, 2]*sqrt(2*π))*e^(-1/2*(y - mx[1, 2])^2/v[1, 2]^2), y = -∞ .. ∞) = 9.41511
OT3inn(x) := (mY[1, 1] - m31(x))^2 + (mY[2, 1] - m32(x))^2 + (Tr(V) + Tr(Σcond3)) - Tr(Dsigma3) + (d*sig^2*(1 - ln(2*sig^2)) + sig^2*ln(|Dsigma3 + sig^2*Id|))
(Tr(V) + Tr(Σcond3)) - Tr(Dsigma3) + (d*sig^2*(1 - ln(2*sig^2)) + sig^2*ln(|Dsigma3 + sig^2*Id|)) = 75.3108
(mY[1, 1] - m31(4))^2 + (mY[2, 1] - m32(4))^2 = 92.25
(Tr(V) + Tr(Σcond3)) - Tr(Dsigma3) = -134.386
d*sig^2*(1 - ln(2*sig^2)) + sig^2*ln(|Dsigma3 + sig^2*Id|) = 209.697
OT3 := integral(OT3inn(y)*1/(v[1, 3]*sqrt(2*π))*e^(-1/2*(y - mx[1, 3])^2/v[1, 3]^2), y = -∞ .. ∞) = 85.5608
Tr(V) + Tr(Σcond3) = 85.75
# [plot: OT3inn(x), OT2inn(x), OT1inn(x) vs x]
Dsigma3 + sig^2*Id = [203.501, 3.51655; 3.51655, 216.635]
d*sig^2*(1 - ln(2*sig^2)) = -859.663
sqrt(OT3) = 9.24991
sig^2*ln(|Dsigma3 + sig^2*Id|) = 1069.36
VY := V[1, 1] + V[2, 2]
iotaepsilon2 := OT3/(2*VY) = 0.891258
SqrtOT3 := integral(sqrt(OT3inn(y))*1/(v[1, 3]*sqrt(2*π))*e^(-1/2*(y - mx[1, 3])^2/v[1, 3]^2), y = -∞ .. ∞) = 9.222
